// COMSOL Multiphysics 6.1.0.357 model "Trumpet_3.mph"
// Outline of the model tree

Parameters
  rM = rT+0.3 [cm]  // Mouthpiece radius
  Lm = 10 [cm]  // Mouthpiece length
  rT = 0.6 [cm]  // Tube radius
  rT_cup = rT/8  // Tube radius at cup
  Lh = 0.2 [m]  // Bell length
  Lt = 1.37 [m]  // Tube length
  LambdaMax = c0/fMax
  c0 = 343 [m/s]
  fMax = 4000 [Hz]
  Lspace = 20 [mm]
  rS = 2 [m]
  lambdaMin = c0/fMin
  fMin = 50 [Hz]
  N = 255

Probes
  bnd1: Boundary "input pressure" on boundaries 5
    type = integral
    expr = acpr.p_t
    unit = Pa
    descr = Total acoustic pressure
    method = summation
    axisym = 2d
    intsurface = on
    table = tbl1
  bnd2: Boundary "input velocity" on boundaries 5
    type = integral
    expr = acpr.v_tz
    unit = m^3/s
    descr = Total acoustic velocity, z-component
    axisym = 2d
    intsurface = on
    table = tbl1
  bnd3: Boundary "impedance" on boundaries 5
    expr = 10*log10(abs(acpr.p_t/acpr.v_tz))
    axisym = 2d
    intsurface = on
    table = tbl1

Geometry
  geom1 "Geometry 1" (2D axisymmetric, length unit m)
    pol2: Polygon | source = table; table = {{0.00600178832792, -1.57000010317}, {0.000749985622857, -1.66103130324}}
    pol5: Polygon
      type = open
      source = table
      table = {{0.00600178832792, -1.57000010317}, {5.51091059616e-19, -1.57000010317}}
    ca1: CircularArc
      center = {0, -(Lh+Lt)-(Lm)}
      r = rM
      point1 = {0.009, -1.67}
      point2 = {0.000749985622857, -1.66103130324}
      angle2 = 85.2199
    pol6: Polygon | type = open; source = table; table = {{0.009, -1.67}, {0, -1.67}}
    pol7: Polygon | type = open; source = table; table = {{5.51091059616e-19, -1.57000010317}, {0, -1.67}}
    csol1: ConvertToSolid | input = ca1, pol2, pol5, pol6, pol7
    r1: Rectangle "emptyspace" | pos = {0, -1.69}; size = {rM, Lspace}
    c1: Circle | r = rS
    c2: Circle | r = rS+LambdaMax
    mov1: Move | input = csol1, r1; specify = pos; displx = 0; disply = 0; newpos = coord
    dif1: Difference | input = c1, c2, mov1(1); input2 = mov1(2)
    fin: Finalize "Form Union"

Materials
  mat1: Common "Air" on all domains
    def "Basic"
      thermalexpansioncoefficient = alpha_p(pA,T)
      molarmass = 0.02897[kg/mol]
      bulkviscosity = muB(T)
      relpermeability = 1
      relpermittivity = 1
      dynamicviscosity = eta(T)
      ratioofspecificheat = 1.4
      electricconductivity = 0[S/m]
      heatcapacity = Cp(T)
      density = rho(pA,T)
      thermalconductivity = k(T)
      soundspeed = cs(T)
      eta: Piecewise | arg = T; pieces = {200.0, 1600.0, -8.38278E-7+8.35717342E-8*T^1-7.69429583E-11*T^2+4.6437266E-14*T^3-1.06585607E-17*T^4}; argunit = K; fununit = Pa*s
      Cp: Piecewise | arg = T; pieces = {200.0, 1600.0, 1047.63657-0.372589265*T^1+9.45304214E-4*T^2-6.02409443E-7*T^3+1.2858961E-10*T^4}; argunit = K; fununit = J/(kg*K)
      rho: Analytic | expr = pA*0.02897/R_const[K*mol/J]/T; args = {pA, T}; fununit = kg/m^3; argunit = {Pa, K}
      k: Piecewise | arg = T; pieces = {200.0, 1600.0, -0.00227583562+1.15480022E-4*T^1-7.90252856E-8*T^2+4.11702505E-11*T^3-7.43864331E-15*T^4}; argunit = K; fununit = W/(m*K)
      cs: Analytic | expr = sqrt(1.4*R_const[K*mol/J]/0.02897*T); args = T; fununit = m/s; argunit = K
      an1: Analytic | funcname = alpha_p; expr = -1/rho(pA,T)*d(rho(pA,T),T); args = {pA, T}; fununit = 1/K; argunit = {Pa, K}
      an2: Analytic "Analytic 2a" | funcname = muB; expr = 0.6*eta(T); args = T; fununit = Pa*s; argunit = K
    RefractiveIndex
      n = 1
      ki = 0
    NonlinearModel
      BA = (def.gamma+1)/2
    idealGas
      Rs = R_const/Mn
      heatcapacity = Cp(T)
      ratioofspecificheat = 1.4
      molarmass = 0.02897
      Cp: Piecewise | arg = T; pieces = {200.0, 1600.0, 1047.63657-0.372589265*T^1+9.45304214E-4*T^2-6.02409443E-7*T^3+1.2858961E-10*T^4}; argunit = K; fununit = J/(kg*K)

Physics
  acpr: PressureAcoustics "Pressure Acoustics, Frequency Domain" on all domains
    dependent variable p
    fpam1: FrequencyPressureAcousticsModel "Pressure Acoustics 1" (default)
    axi1: AxialSymmetry (default)
    shb1: SoundHard "Sound Hard Boundary (Wall) 1" (default)
    init1: init "Initial Values 1" (default)
    ishb1: InteriorSoundHard "Interior Sound Hard Boundary (Wall) 1" on boundaries 9, 15
    port1: Port on boundaries 5 | PortType = Circular; p = 1.1; pamp = 1.1

Mesh
  mesh1 "Mesh 1"
    size: MeshSizeDefault | hmax = LambdaMax/5; custom = on
    ftri1: FreeTri "Free Triangular 1" on domains 2, 3
    map1: Map "Mapped 1" on domains 1 | smoothmaxiter = 4

Studies
  std1 "Study 1"
    freq: Frequency "Frequency Domain" | plist = range(fMin,(fMax-fMin)/N,fMax)

Solver configurations
  sol1 "Solution 1" (study std1)
    v1: Variables "Dependent Variables 1"
    s1: Stationary "Stationary Solver 1" | linpmethod = sol
      dDef: Direct
      p1: Parametric | pname = freq; plistarr = range(fMin,(fMax-fMin)/N,fMax); punit = Hz; pcontinuationmode = no
      fc1: FullyCoupled | linsolver = dDef

Datasets
  dset1: Solution | solution = sol1
  dset2: Solution "Probe Solution 2" | solution = sol1
  int1: Integral "input pressure" on boundaries 5 | data = dset2
  int2: Integral "input velocity" on boundaries 5 | data = dset2
  avh1: Average "impedance" on boundaries 5 | data = dset2
  rev1: Revolve2D "Revolution 2D 1" | data = dset1; startangle = -90; revangle = 225

Derived values
  pev1: EvalPoint "input pressure" | data = int1; table = tbl1; expr = acpr.p_t
  pev2: EvalPoint "input velocity" | data = int2; table = tbl1; expr = acpr.v_tz
  pev3: EvalPoint "impedance" | data = avh1; table = tbl1; expr = 10*log10(abs(acpr.p_t/acpr.v_tz))

Tables
  tbl1: Table "Probe Table 1"
    freq (Hz) | Total acoustic pressure (Pa), input pressure | Total acoustic velocity, z-component (m^3/s), input velocity | 10*log10(abs(acpr.p_t/acpr.v_tz)), impedance
    50 | 11.0828+6.91712i | 3.76132e-07-6.02651e-07i | 28.3501
    65.4902 | 12.5804+5.95581i | 2.45647e-07-5.18879e-07i | 29.5514
    80.9804 | 13.4596+5.11054i | 1.69047e-07-4.45217e-07i | 30.5107
    96.4706 | 14.0058+4.41892i | 1.21452e-07-3.84944e-07i | 31.3166
    111.961 | 14.3639+3.85775i | 9.02502e-08-3.36037e-07i | 32.0179
    127.451 | 14.609+3.3994i | 6.88971e-08-2.96087e-07i | 32.6429
    142.941 | 14.7838+3.0182i | 5.36645e-08-2.62861e-07i | 33.2138
    158.431 | 14.9122+2.69707i | 4.24788e-08-2.34867e-07i | 33.7429
    173.922 | 15.009+2.42255i | 3.40466e-08-2.10936e-07i | 34.2407
    189.412 | 15.0836+2.18472i | 2.75488e-08-1.90201e-07i | 34.7152
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
Plots
  pg5: PlotGroup1D "Probe Plot Group 5"
    tblp1: Table "Probe Table Graph 1" | table = tbl1
  pg6: PlotGroup2D "Acoustic Pressure (acpr)" | data = dset1
    surf1: Surface | expr = acpr.p_t
  pg7: PlotGroup2D "Sound Pressure Level (acpr)" | data = dset1
    surf1: Surface | expr = acpr.Lp_t
  pg8: PlotGroup3D "Acoustic Pressure, 3D (acpr)" | data = rev1
    surf1: Surface | expr = acpr.p_t
  pg9: PlotGroup3D "Sound Pressure Level, 3D (acpr)" | data = rev1
    surf1: Surface | expr = acpr.Lp_t