// COMSOL Multiphysics 6.1.0.357 model "Ex_3.mph"
// Outline of the model tree

Parameters
  rM = rT+0.3 [cm]  // Mouthpiece radius
  Lm = 10 [cm]  // Mouthpiece length
  rT = 0.6 [cm]  // Tube radius
  rT_cup = rT/8  // Tube radius at cup
  Lh = 0.2 [m]  // Bell length
  Lt = 1.37 [m]  // Tube length
  LambdaMax = c0/fMax
  c0 = 343 [m/s]
  fMax = 4000 [Hz]
  Lspace = 20 [mm]
  rS = 1 [m]
  lambdaMin = c0/fMin
  fMin = 50 [Hz]
  N = 255

Variables
  var1 "Variables 1"
    Pressure = acpr.p_t
    Velocity = acpr.vz

Couplings
  intop2: Integration on boundaries 5 | opname = intop1; axisym = on
  maxop1: Maximum on boundaries 12, 13

Coordinate systems
  pml1: PML "Perfectly Matched Layer 1" on domains 1

Geometry
  geom1 "Geometry 1" (2D axisymmetric, length unit m)
    pol2: Polygon | source = table; table = {{0.00600178832792, -1.57000010317}, {0.000749985622857, -1.66103130324}}
    pol5: Polygon
      type = open
      source = table
      table = {{0.00600178832792, -1.57000010317}, {5.51091059616e-19, -1.57000010317}}
    ca1: CircularArc
      center = {0, -(Lh+Lt)-(Lm)}
      r = rM
      point1 = {0.009, -1.67}
      point2 = {0.000749985622857, -1.66103130324}
      angle2 = 85.2199
    pol6: Polygon | type = open; source = table; table = {{0.009, -1.67}, {0, -1.67}}
    pol7: Polygon | type = open; source = table; table = {{5.51091059616e-19, -1.57000010317}, {0, -1.67}}
    csol1: ConvertToSolid | input = ca1, pol2, pol5, pol6, pol7
    r1: Rectangle "emptyspace" | pos = {0, -1.69}; size = {rM, Lspace}
    c1: Circle | rot = -90; r = rS; angle = 180
    c2: Circle | rot = -90; r = rS+LambdaMax; angle = 180
    mov1: Move | input = csol1, r1; specify = pos; displx = 0; disply = 0; newpos = coord
    dif1: Difference | input = c1, c2, mov1(1); input2 = mov1(2)
    fin: Finalize "Form Union"

Materials
  mat1: Common "Air" on all domains
    def "Basic"
      thermalexpansioncoefficient = alpha_p(pA,T)
      molarmass = 0.02897[kg/mol]
      bulkviscosity = muB(T)
      relpermeability = 1
      relpermittivity = 1
      dynamicviscosity = eta(T)
      ratioofspecificheat = 1.4
      electricconductivity = 0[S/m]
      heatcapacity = Cp(T)
      density = rho(pA,T)
      thermalconductivity = k(T)
      soundspeed = cs(T)
      eta: Piecewise | arg = T; pieces = {200.0, 1600.0, -8.38278E-7+8.35717342E-8*T^1-7.69429583E-11*T^2+4.6437266E-14*T^3-1.06585607E-17*T^4}; argunit = K; fununit = Pa*s
      Cp: Piecewise | arg = T; pieces = {200.0, 1600.0, 1047.63657-0.372589265*T^1+9.45304214E-4*T^2-6.02409443E-7*T^3+1.2858961E-10*T^4}; argunit = K; fununit = J/(kg*K)
      rho: Analytic | expr = pA*0.02897/R_const[K*mol/J]/T; args = {pA, T}; fununit = kg/m^3; argunit = {Pa, K}
      k: Piecewise | arg = T; pieces = {200.0, 1600.0, -0.00227583562+1.15480022E-4*T^1-7.90252856E-8*T^2+4.11702505E-11*T^3-7.43864331E-15*T^4}; argunit = K; fununit = W/(m*K)
      cs: Analytic | expr = sqrt(1.4*R_const[K*mol/J]/0.02897*T); args = T; fununit = m/s; argunit = K
      an1: Analytic | funcname = alpha_p; expr = -1/rho(pA,T)*d(rho(pA,T),T); args = {pA, T}; fununit = 1/K; argunit = {Pa, K}
      an2: Analytic "Analytic 2a" | funcname = muB; expr = 0.6*eta(T); args = T; fununit = Pa*s; argunit = K
    RefractiveIndex
      n = 1
      ki = 0
    NonlinearModel
      BA = (def.gamma+1)/2
    idealGas
      Rs = R_const/Mn
      heatcapacity = Cp(T)
      ratioofspecificheat = 1.4
      molarmass = 0.02897
      Cp: Piecewise | arg = T; pieces = {200.0, 1600.0, 1047.63657-0.372589265*T^1+9.45304214E-4*T^2-6.02409443E-7*T^3+1.2858961E-10*T^4}; argunit = K; fununit = J/(kg*K)

Physics
  acpr: PressureAcoustics "Pressure Acoustics, Frequency Domain" on all domains
    dependent variable p
    fpam1: FrequencyPressureAcousticsModel "Pressure Acoustics 1" (default)
    axi1: AxialSymmetry (default)
    shb1: SoundHard "Sound Hard Boundary (Wall) 1" (default)
    init1: init "Initial Values 1" (default)
    ishb1: InteriorSoundHard "Interior Sound Hard Boundary (Wall) 1" on boundaries 9, 15
    port1: Port on boundaries 5 | PortType = Circular; p = 1.1; pamp = 1.1

Mesh
  mesh1 "Mesh 1"
    size: MeshSizeDefault | hmax = LambdaMax/5; custom = on
    ftri1: FreeTri "Free Triangular 1" on domains 2, 3
    map1: Map "Mapped 1" on domains 1 | smoothmaxiter = 4

Studies
  std1 "Study 1"
    freq: Frequency "Frequency Domain" | plist = range(fMin,(fMax-fMin)/N,fMax)

Solver configurations
  sol1 "Solution 1" (study std1)
    v1: Variables "Dependent Variables 1"
    s1: Stationary "Stationary Solver 1" | linpmethod = sol
      dDef: Direct
      p1: Parametric | pname = freq; plistarr = range(fMin,(fMax-fMin)/N,fMax); punit = Hz; pcontinuationmode = no
      fc1: FullyCoupled | linsolver = dDef

Datasets
  dset1: Solution | solution = sol1
  rev1: Revolve2D "Revolution 2D 1" | data = dset1; startangle = -90; revangle = 225
  pc1: ParCurve3D "Parameterized Curve 3D 1" | data = rev1; parmax1 = 360 [deg]; expry = rS*sin(s); exprz = rS*cos(s)

Plots
  pg6: PlotGroup2D "Acoustic Pressure (acpr)" | data = dset1
    surf1: Surface | expr = acpr.p_t
  pg7: PlotGroup2D "Sound Pressure Level (acpr)" | data = dset1
    surf1: Surface | expr = acpr.Lp_t
  pg8: PlotGroup3D "Acoustic Pressure, 3D (acpr)" | data = rev1
    surf1: Surface | expr = acpr.p_t
  pg9: PlotGroup3D "Sound Pressure Level, 3D (acpr)" | data = rev1
    surf1: Surface | expr = acpr.Lp_t
  pg11: PlotGroup1D "Impedance" | data = dset1; xlabel = freq (Hz); ylabel = |Z_in| (dB)
    glob1: Global | expr = 10*log10(abs(intop1(Pressure)/intop1(Velocity)))
  pg10: PolarGroup "Polar Plot Directivity" | data = pc1; rmin = -2; rmax = 0.0999999046326; zeroangle = up; rotdir = cw
    lngr1: LineGraph | expr = acpr.Lp_t-maxop1(acpr.Lp_t); xdata = spacevar