// COMSOL Multiphysics 6.1.0.357 model "Ex_4.mph"
// Outline of the model tree

Parameters
  rT = 0.6[cm]  // Tube radius
  rS = 2[m]  // Air sphere radius
  N = 255  // Num of freqs
  Lt = 1.37[m]  // Tube length
  Lspace = 20[mm]  // Length empty space
  fmin = 50[Hz]  // min freq
  fmax = 4000[Hz]  // max freq
  c0 = 343 [m/s]  // wave speed
  lambdaMax = c0/fmax  // wavelength max freq
  p0 = 1.1[Pa]  // Input pressure
  Lh = 0.2[m]  // Bell length
  m = 28  // Bell exp
  St = rT^2*pi  // Surface tube
  rM = rT+0.3 [cm]  // Mouthpiece radius
  Lm = 10 [cm]  // Mouthpiece length

Variables
  var1 "Variables 1" on boundaries 5
    Pressure = intop1(acpr.p_t)
    Velocity = intop1(acpr.vz)
    Vel2 = intop1(acpr.v_tz)
    Z_in = abs(Pressure/Velocity)
    Zzz = 10*log10(Z_in[(m^3)/(N*s)])
    max = maxop1(acpr.Lp_t)
  var2 "Variables 2"
    Z_tr = comp1.Zzz  // Specific characteristic acoustic impedance

Couplings
  intop2: Integration on boundaries 5 | opname = intop1; axisym = on
  maxop1: Maximum on boundaries 16, 17

Coordinate systems
  pml1: PML "Perfectly Matched Layer 1" on domains 1

Geometry
  geom1 "Geometry 1" (2D axisymmetric, length unit m)
    r1: Rectangle | pos = {0, -Lt-Lh}; size = {rT, Lt}
    pol2: Polygon | source = table; table = {{0, -Lt-Lh}, {0, -Lt-Lh-Lm+rM}, {rT/8, -Lt-Lh-Lm+rM}, {rT, -Lt-Lh}}
    c3: Circle (disabled) | pos = {0, -Lt-Lh-Lm}; r = rM; angle = 90
    ca1: CircularArc
      specify = endsr
      center = {5.44270091956e-08, -1.66996870011}
      r = rM
      point1 = {rT/8, -Lt-Lh-Lm+rM}
      point2 = {rM, -Lt-Lh-Lm}
      angle1 = 85.2201558552
      angle2 = 359.8007383007845
      clockwise = on
    pc1: ParametricCurve | pos = {0, -Lh}; parmax = Lh; coord = {sqrt((St/pi)*exp(m*s)), s}
    pol1: Polygon | type = open; source = table; table = {{0.006, -0.2}, {0, -0.2}, {0, 0}, {0.0986678806266, 0}}
    csol1: ConvertToSolid | input = pc1, pol1
    pol3: Polygon | type = open; source = table; table = {{0, -Lt-Lh-Lm+rM}, {0, -Lt-Lh-Lm}, {rM, -Lt-Lh-Lm}}
    csol2: ConvertToSolid | input = ca1, pol2, pol3
    uni1: Union | input = csol1, csol2, r1; intbnd = off; edge = all
    r2: Rectangle | pos = {0, -Lt-Lspace-Lh-Lm}; size = {rM, Lspace}
    c1: Circle | rot = -90; r = rS; angle = 180
    c2: Circle | rot = -90; r = rS+lambdaMax; angle = 180
    dif1: Difference | input = c1, c2; input2 = r2
    fin: Finalize "Form Union"

Materials
  mat1: Common "Air" on all domains
    def "Basic"
      thermalexpansioncoefficient = alpha_p(pA,T)
      molarmass = 0.02897[kg/mol]
      bulkviscosity = muB(T)
      relpermeability = 1
      relpermittivity = 1
      dynamicviscosity = eta(T)
      ratioofspecificheat = 1.4
      electricconductivity = 0[S/m]
      heatcapacity = Cp(T)
      density = rho(pA,T)
      thermalconductivity = k(T)
      soundspeed = cs(T)
      eta: Piecewise | arg = T; pieces = {200.0, 1600.0, -8.38278E-7+8.35717342E-8*T^1-7.69429583E-11*T^2+4.6437266E-14*T^3-1.06585607E-17*T^4}; argunit = K; fununit = Pa*s
      Cp: Piecewise | arg = T; pieces = {200.0, 1600.0, 1047.63657-0.372589265*T^1+9.45304214E-4*T^2-6.02409443E-7*T^3+1.2858961E-10*T^4}; argunit = K; fununit = J/(kg*K)
      rho: Analytic | expr = pA*0.02897/R_const[K*mol/J]/T; args = {pA, T}; fununit = kg/m^3; argunit = {Pa, K}
      k: Piecewise | arg = T; pieces = {200.0, 1600.0, -0.00227583562+1.15480022E-4*T^1-7.90252856E-8*T^2+4.11702505E-11*T^3-7.43864331E-15*T^4}; argunit = K; fununit = W/(m*K)
      cs: Analytic | expr = sqrt(1.4*R_const[K*mol/J]/0.02897*T); args = T; fununit = m/s; argunit = K
      an1: Analytic | funcname = alpha_p; expr = -1/rho(pA,T)*d(rho(pA,T),T); args = {pA, T}; fununit = 1/K; argunit = {Pa, K}
      an2: Analytic "Analytic 2a" | funcname = muB; expr = 0.6*eta(T); args = T; fununit = Pa*s; argunit = K
    RefractiveIndex
      n = 1
      ki = 0
    NonlinearModel
      BA = (def.gamma+1)/2
    idealGas
      Rs = R_const/Mn
      heatcapacity = Cp(T)
      ratioofspecificheat = 1.4
      molarmass = 0.02897
      Cp: Piecewise | arg = T; pieces = {200.0, 1600.0, 1047.63657-0.372589265*T^1+9.45304214E-4*T^2-6.02409443E-7*T^3+1.2858961E-10*T^4}; argunit = K; fununit = J/(kg*K)

Physics
  acpr: PressureAcoustics "Pressure Acoustics, Frequency Domain" on all domains
    dependent variable p
    fpam1: FrequencyPressureAcousticsModel "Pressure Acoustics 1" (default)
    axi1: AxialSymmetry (default)
    shb1: SoundHard "Sound Hard Boundary (Wall) 1" (default)
    init1: init "Initial Values 1" (default)
    port1: Port on boundaries 5 | PortType = Circular; pamp = p0
    ishb1: InteriorSoundHard "Interior Sound Hard Boundary (Wall) 1" on boundaries 12, 13, 19, 20

Mesh
  mesh1 "Mesh 1"
    size: MeshSizeDefault | hmax = lambdaMax/5
    ftri1: FreeTri "Free Triangular 1" on domains 2, 3
    map1: Map "Mapped 1" on remaining entities

Studies
  std1 "Study 1"
    freq: Frequency "Frequency Domain" | plist = range(fmin,(fmax-fmin)/(N),fmax)

Solver configurations
  sol1 "Solution 1" (study std1)
    v1: Variables "Dependent Variables 1"
    s1: Stationary "Stationary Solver 1" | linpmethod = sol
      dDef: Direct
      p1: Parametric | pname = freq; plistarr = range(fmin,(fmax-fmin)/(N),fmax); punit = Hz; pcontinuationmode = no
      fc1: FullyCoupled | linsolver = dDef

Datasets
  dset1: Solution | solution = sol1
  rev1: Revolve2D "Revolution 2D 1" | data = dset1; startangle = -90; revangle = 225
  pc1: ParCurve3D "Parameterized Curve 3D 1" | data = rev1; parmax1 = 360[deg]; expry = rS*sin(s); exprz = rS*cos(s)

Plots
  pg1: PlotGroup2D "Acoustic Pressure (acpr)" | data = dset1
    surf1: Surface | expr = acpr.p_t
  pg2: PlotGroup2D "Sound Pressure Level (acpr)" | data = dset1
    surf1: Surface | expr = acpr.Lp_t
  pg3: PlotGroup3D "Acoustic Pressure, 3D (acpr)" | data = rev1
    surf1: Surface | expr = acpr.p_t
  pg4: PlotGroup3D "Sound Pressure Level, 3D (acpr)" | data = rev1
    surf1: Surface | expr = acpr.Lp_t
  pg7: PlotGroup1D "Impedance" | data = none; xlabel = freq (Hz); ylabel = |Z_in| (dB)
    glob1: Global | data = dset1; expr = 10*log10(abs(intop1(Pressure)/intop1(Velocity)))
  pg6: PolarGroup "Polar Plot Directivity" | data = pc1; rmin = -40; zeroangle = up; rotdir = cw
    lngr1: LineGraph | expr = acpr.Lp_t-maxop1(acpr.Lp_t); xdata = spacevar